08.03.2023
11:37
;; 1. Based on: run029
;; 2. Description: CESAR CIV-001 EuroTARGET PKPD Sunitinib
;; x1. Author: user
$PROBLEM    CESAR CIV-boot_029 EuroTARGET PKPD Sunitinib model by YU
;           et al
;-----------------------------------------

;  UNITS                                  |

;  TIME - HOURS                           |

;  DOSE - UG                              |

;  CP  - NG/ML  -> UG/L                   |

;  LLOQ - 0.06 NG/ML                      |

;  CL - L/HOUR                            |

;  VOLUMES - L                            |

;------------------------------------------
$INPUT      C ID ETID=DROP DAT=DROP CTIME=DROP TRTW TIME AMT DOS
            DV=DROP LNDV=DV EVID MDV CMT TRTM F_LAG LOQS LOQSM LOQP
            STUDY CENTER AGE SEX WEIGHT HEIGHT BMI ALA ASA ALB ALKP
            CAL SCREA CRCL LDH BILI SMOKE CYP1 ABCR1 ABCR2 ABCR3
            VEGFA1 VEGFA2 VEGFA3 VEGFA4 KDR1 FLT1 FLT2 FLT3 IL8 HAPAB
            HAPVG BSA CYC
$DATA      ..\..\Suni_PK_final.csv IGNORE=C IGNORE(C.EQ.1)
            IGNORE(TRTM.EQ.2)
 ; Excluded Data records
 ; Only Sunitinib patients
$SUBROUTINE ADVAN6 TOL=4
$MODEL      NCOMP=5 COMP=(DEPOT,DEFDOSE) ; Dosing compartment
            COMP=(OBSLIV) ; Sunitinib central compartment
            COMP=(PERISUN) ; Sunitinib peripheral compartment
            COMP=(CENTRALM) ; SU12662 central compartment
            COMP=(PERIM) ; SU12662 peripheral compartment
$PK

WT = WEIGHT
IF(WEIGHT.EQ.-99.AND.SEX.EQ.1) WT = 83  ; ET Population mean - male
IF(WEIGHT.EQ.-99.AND.SEX.EQ.0) WT = 75  ; ET Population mean - female
ASCL   = (WT/70)**0.75
ASV    = WT/70

K12    = THETA(1)
V2     = THETA(2)*ASV * EXP(ETA(1))
QH     = THETA(3)*ASCL
CLP    = THETA(4)*ASCL* EXP(ETA(3))
CLM    = THETA(5)*ASCL
V3     = THETA(6)*ASV * EXP(ETA(2))
Q34    = THETA(7)*ASCL
V4     = THETA(8)*ASV
FM     = THETA(9)      * EXP(ETA(4))
Q25    = THETA(10)*ASCL
V5     = THETA(11)*ASV

K34 = Q34/V3
K43 = Q34/V4
K25 = Q25/V2
K52 = Q25/V5

S2 = V2
S3 = V3

$DES
CLIV = (K12*A(1) + QH/V2*A(2))/(QH+CLP)

DADT(1) = -K12*A(1)
DADT(2) = QH*CLIV-QH/V2*A(2) - K25*A(2) + K52*A(5)
DADT(3) = FM*CLP*CLIV-CLM/V3*A(3)-K34*A(3) + K43*A(4)
DADT(4) = K34*A(3)-K43*A(4)
DADT(5) = K25*A(2) - K52*A(5)

$ERROR
TY = LOG(F)
IF(F.LT.0.001) TY = 0.001
IPRED = TY

IF (CMT.EQ.2) THEN
W     = SQRT(THETA(12)**2)
Y     = IPRED+W*EPS(1)
ENDIF

IF (CMT.EQ.3) THEN
W     = SQRT(THETA(13)**2)
Y     = IPRED+W*EPS(2)
ENDIF

IRES = DV-IPRED
  DEL            = 0
  IF(W.EQ.0) DEL = 0.0001
  IWRES           = IRES/(W+DEL)

$THETA  (0,0.11352946) ; 1 = K12 – Absorption rate constant
 (0,2588.981063) ; 2 = V2 – Central volume of distribution of sunitinib
 80 FIX ; 3 = QH – Hepatic blood flow X
 (0,28.1906103) ; 4 = CLP – Clearance of sunitinib
 (0,18.998626) ; 5 = CLM – Clearance of SU12662
 (0,560.5070748) ; 6 = V3 – Central volume of distribution of SU12662
 (0,2.792258338) ; 7 = Q34 – Inter-compartmental clearance of SU12662
 (0,753.2993553) ; 8 = V4 – Peripheral volumes of distribution of SU12662
 0.21 FIX ; 9 = FM – Fraction of sunitinib converted to SU12662 X
 (0,0.346136576) ; 10 = Q25  Inter-compartmental clearance of Sunitinib
 588 FIX ; 11 = V5 – Peripheral volumes of distribution of Sunitinib X
 0.451778744 ; 12 =  Prop. Error Suni
 0.284341294 ; 13 = Prop. Error Metab
$OMEGA  BLOCK(4) FIX
 0.0621  ;   1 IIV V2
 0.0473 0.169  ;   2 IIV V3
 0 -0.0613 0.088  ;  3 IIV CLP
 0 0 -0.0421 0.113  ;   4 IIV FM
$SIGMA  1  FIX  ; Proportional error sunitinib
 1  FIX  ; Proportional error SU12662
$ESTIMATION SIG=2 SIGL=4 PRINT=1 METHOD=1 INTER MAXEVAL=9999 NOABORT
            MSFO=etspkfboot_029.msf
$COVARIANCE PRINT=E
$TABLE      ID TIME CMT TRTW IPRED IWRES IRES CWRES MDV NOPRINT
            ONEHEADER FILE=SDTABFboot_029.csv
;$TABLE ID TIME ETA1 ETA2 ETA3 ETA4 K12 V2 QH CLP FM WEIGHT CLM V2 V3 Q34 V4 V5 Q25 FM NOPRINT NOAPPEND ONEHEADER FILE=PATABFboot_029

NM-TRAN MESSAGES
 WARNINGS AND ERRORS (IF ANY) FOR PROBLEM    1
 (WARNING  2) NM-TRAN INFERS THAT THE DATA ARE POPULATION.
 (WARNING  3) THERE MAY BE AN ERROR IN THE ABBREVIATED CODE. THE FOLLOWING
 ONE OR MORE RANDOM VARIABLES ARE DEFINED WITH "IF" STATEMENTS THAT DO NOT
 PROVIDE DEFINITIONS FOR BOTH THE "THEN" AND "ELSE" CASES. IF ALL
 CONDITIONS FAIL, THE VALUES OF THESE VARIABLES WILL BE ZERO.
   Y

1NONLINEAR MIXED EFFECTS MODEL PROGRAM (NONMEM) VERSION 7.5.0
 ORIGINALLY DEVELOPED BY STUART BEAL, LEWIS SHEINER, AND ALISON BOECKMANN
 CURRENT DEVELOPERS ARE ROBERT BAUER, ICON DEVELOPMENT SOLUTIONS,
 AND ALISON BOECKMANN. IMPLEMENTATION, EFFICIENCY, AND STANDARDIZATION
 PERFORMED BY NOUS INFOSYSTEMS.
 PROBLEM NO.:         1
 CESAR CIV-boot_029 EuroTARGET PKPD Sunitinib model by YU
 TOT. NO. OF OBS RECS:      606
 TOT. NO. OF INDIVIDUALS:       47
 GENERAL NONLINEAR KINETICS MODEL (DVERK1, ADVAN6)
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 #TBLN:      1
 #METH: First Order Conditional Estimation with Interaction
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
 #TERM:
0MINIMIZATION SUCCESSFUL
 NO. OF FUNCTION EVALUATIONS USED:      377
 NO. OF SIG. DIGITS IN FINAL EST.:  2.2

 ETABAR IS THE ARITHMETIC MEAN OF THE ETA-ESTIMATES,
 AND THE P-VALUE IS GIVEN FOR THE NULL HYPOTHESIS THAT THE TRUE MEAN IS 0.

 ETABAR:         8.8430E-04  1.3126E-02  5.6066E-04 -1.0239E-03
 SE:             2.7753E-02  4.5764E-02  3.8901E-02  4.4725E-02
 N:                      47          47          47          47

 P VAL.:         9.7458E-01  7.7425E-01  9.8850E-01  9.8174E-01

 ETASHRINKSD(%)  2.2823E+01  2.2856E+01  9.1258E+00  7.8011E+00
 ETASHRINKVR(%)  4.0437E+01  4.0488E+01  1.7419E+01  1.4994E+01
 EBVSHRINKSD(%)  2.3637E+01  1.9829E+01  1.2280E+01  8.8130E+00
 EBVSHRINKVR(%)  4.1687E+01  3.5725E+01  2.3051E+01  1.6849E+01
 RELATIVEINF(%)  4.6170E+01  2.9537E+01  6.5996E+01  8.1359E+01
 EPSSHRINKSD(%)  9.2803E+00  1.0696E+01
 EPSSHRINKVR(%)  1.7699E+01  2.0247E+01


 TOTAL DATA POINTS NORMALLY DISTRIBUTED (N):          606
 N*LOG(2PI) CONSTANT TO OBJECTIVE FUNCTION:    1113.7535022440634
 OBJECTIVE FUNCTION VALUE WITHOUT CONSTANT:   -501.07718421347261
 OBJECTIVE FUNCTION VALUE WITH CONSTANT:       612.67631803059078
 REPORTED OBJECTIVE FUNCTION DOES NOT CONTAIN CONSTANT

 TOTAL EFFECTIVE ETAS (NIND*NETA):                           188


 #TERE:
 Elapsed estimation  time in seconds:   136.07
 Elapsed covariance  time in seconds:   121.54
 Elapsed postprocess time in seconds:     0.87

 ********************               FIRST ORDER CONDITIONAL ESTIMATION WITH INTERACTION              ********************
 #OBJT:**************                       MINIMUM VALUE OF OBJECTIVE FUNCTION                      ********************
 #OBJV:********************************************     -501.077       **************************************************

 ********************               FIRST ORDER CONDITIONAL ESTIMATION WITH INTERACTION              ********************
 ********************                             FINAL PARAMETER ESTIMATE                           ********************

 THETA - VECTOR OF FIXED EFFECTS PARAMETERS   *********
         TH 1      TH 2      TH 3      TH 4      TH 5      TH 6      TH 7      TH 8      TH 9      TH10      TH11      TH12
          TH13
         1.33E-01  1.82E+03  8.00E+01  3.39E+01  1.65E+01  7.30E+02  2.75E+00  5.92E+02  2.10E-01  3.71E-01  5.88E+02  3.67E-01
          2.81E-01

 OMEGA - COV MATRIX FOR RANDOM EFFECTS - ETAS  ********
         ETA1      ETA2      ETA3      ETA4
 ETA1
+        6.21E-02
 ETA2
+        4.73E-02  1.69E-01
 ETA3
+        0.00E+00 -6.13E-02  8.80E-02
 ETA4
+        0.00E+00  0.00E+00 -4.21E-02  1.13E-01

 SIGMA - COV MATRIX FOR RANDOM EFFECTS - EPSILONS  ****
         EPS1      EPS2
 EPS1
+        1.00E+00
 EPS2
+        0.00E+00  1.00E+00

 OMEGA - CORR MATRIX FOR RANDOM EFFECTS - ETAS  *******
         ETA1      ETA2      ETA3      ETA4
 ETA1
+        2.49E-01
 ETA2
+        4.62E-01  4.11E-01
 ETA3
+        0.00E+00 -5.03E-01  2.97E-01
 ETA4
+        0.00E+00  0.00E+00 -4.22E-01  3.36E-01

 SIGMA - CORR MATRIX FOR RANDOM EFFECTS - EPSILONS  ***
         EPS1      EPS2
 EPS1
+        1.00E+00
 EPS2
+        0.00E+00  1.00E+00

 ********************               FIRST ORDER CONDITIONAL ESTIMATION WITH INTERACTION              ********************
 ********************                            STANDARD ERROR OF ESTIMATE                          ********************

 THETA - VECTOR OF FIXED EFFECTS PARAMETERS   *********
         TH 1      TH 2      TH 3      TH 4      TH 5      TH 6      TH 7      TH 8      TH 9      TH10      TH11      TH12
          TH13
         3.41E-02  1.15E+02 .........  1.95E+00  9.00E-01  8.40E+01  5.51E-01  8.03E+01 .........  5.98E-02 .........  4.86E-02
          2.76E-02

 OMEGA - COV MATRIX FOR RANDOM EFFECTS - ETAS  ********
         ETA1      ETA2      ETA3      ETA4
 ETA1
+       .........
 ETA2
+       ......... .........
 ETA3
+       ......... ......... .........
 ETA4
+       ......... ......... ......... .........

 SIGMA - COV MATRIX FOR RANDOM EFFECTS - EPSILONS  ****
         EPS1      EPS2
 EPS1
+       .........
 EPS2
+       ......... .........

 OMEGA - CORR MATRIX FOR RANDOM EFFECTS - ETAS  *******
         ETA1      ETA2      ETA3      ETA4
 ETA1
+       .........
 ETA2
+       ......... .........
 ETA3
+       ......... ......... .........
 ETA4
+       ......... ......... ......... .........

 SIGMA - CORR MATRIX FOR RANDOM EFFECTS - EPSILONS  ***
         EPS1      EPS2
 EPS1
+       .........
 EPS2
+       ......... .........
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
 ********************               FIRST ORDER CONDITIONAL ESTIMATION WITH INTERACTION              ********************
 ********************                      EIGENVALUES OF COR MATRIX OF ESTIMATE                     ********************

             1         2         3         4         5         6         7         8         9        10
         9.22E-02  1.13E-01  2.42E-01  2.99E-01  4.53E-01  5.90E-01  1.26E+00  1.77E+00  2.28E+00  2.90E+00
 Elapsed finaloutput time in seconds:     0.82
 #CPUT: Total CPU Time in Seconds,      252.563
